#define POLE_VULNERABILITY_ANALYSIS=on
#define PSPS_ANALYSIS=off
#define VEGETATION_VULNERABILITY_ANALYSIS=off
#define STARTTIME=2021-06-28 00:00:00
#define STOPTIME=2021-06-28 00:00:00
#define TIMEZONE=PST+8PDT
