// Test poles
//
//
// Convert command:
//   gridlabd convert CARDINAL_Polar\ -\ Design\ CalcDesign\ DSO.xlsx cardinal_poles.csv -f xlsx-spida -t csv-geodata
//
// Run command:
//   gridlabd main_cardinal_poles.glm // cardinal_poles.glm
//
// Python command:
//   convert('CARDINAL_Polar - Design CalcDesign DSO.xlsx', 'CARDINAL_PolarDesign Attachment and Equipment_Asset Details from SPIDA and SAP.xlsx', 'cardinal_poles.csv', options={'extract_equipment':'yes','include_network':'yes', 'include_mount':'yes', 'include_network':'CARDINAL.csv'})
//
#define suppress_repeat_messages=TRUE
#define pythonpath="/usr/local/opt/gridlabd/current/share/gridlabd/template/US/CA/SLAC/anticipation"

module status_log;
module climate;
module tape;

module powerflow {
	solver_method NR;
	line_capacitance true;
	message_flags VERBOSE;
	}
module reliability {
    report_event_log true;
}


#ifdef WIND_SPEED_FILE
object climate {
	name weather;
	object player {
		property wind_speed;
		file "/tmp/output/$WIND_SPEED_FILE";
	};
}
#else
#weather get CA-Chino_Airport.tmy3
object climate {
	name weather;
	tmyfile "CA-Chino_Airport.tmy3";
}
#endif
