#define WEATHER=CA-San_Jose_Intl_Ap.tmy3
#define NHOUSES=1
#define TIMEZONE=PST+8PDT
#define STARTTIME=2020-01-01 00:00:00 PST
#define STOPTIME=2021-01-01 00:00:00 PST
#define HEATINGSYSTEMTYPE=HEAT_PUMP
#define COOLINGSYSTEMTYPE=HEAT_PUMP
#define HEATINGSETPOINT=71degF
#define COOLINGSETPOINT=74degF
#define THERMALINTEGRITYLEVEL=GOOD
#define FLOORAREA=1000sf
#define GASENDUSES=DRYER
