class meter
{
	string monthly_charges;
	string monthly_usage;
	string monthly_power;
	string monthly_demand;
	double monthly_updated_charges[$];
	double monthly_updated_usage[kWh];
	double monthly_updated_power[W];
}
